task1
x := 2
n := round(rnd(10))
n = 5
y := (sqrt(x^3 + n) + cos(|n*x - 1|)^2)/(nthroot(x^5 + sin(x) + n, 4)*cos*(π/4*(x + n)))
y = -1.0215
task2
x := 7
y := 10
z := -3
p :=
    if x > y
        p ← sin(x) + 3*|y| - z^2
    else
        p ← (x + y)/sqrt(z^2 + 5)*ln(|x + 1|)
    p
p = 9.44782
q :=
    if (x > y) and (x < 1)
        q ← cos(x) + 2*|y + 1| - z
    else
        q ← (x*y + 3)/sqrt(z^2 + 5)
    q
q = 19.5101
w :=
    if (x < y) or (y ≥ 10)
        w ← x^2 + 2*(y*x + 1) - z
    else
        w ← (x^-3*y^2 + 3)*sqrt(z^2 + 7)
    w
w = 194
task3
x := -2, -1.6 .. 2
f(x) := (x^2 - n*x + sin(x))*sqrt(|x - cos(x*n)|)
f(x) = [14.1048; 11.5301; 9.56509; 1.50067; 0.224988; 0; -1.31047; -3.18616; -1.7767; -5.86657; -8.5776]
task4
a := -3*n
a = -15
b := 3*n
b = 15
A := round(runif(3, a, b))
B := round(runif(3, a, b))
C := round(runif(3, a, b))
A = [3; -10; -1]
B = [-13; 8; 1]
C = [11; 14; 1]
s := A*B
s = -120
V := B×C
V = [-6; 24; -270]
w := (A×B)*C
w = 12
crossMultiply(a, b) := a*b
mixedMultiply(a, b, c) := (a×b)*c
s1 := crossMultiply(A, B)
s1 = -120
w1 := mixedMultiply(A, B, C)
vectorMultiply(a, b) := a×b
w1 = 12
V1 := vectorMultiply(B, C)
V1 = [-6; 24; -270]
m := length(A)
m = 3
|A| = 10.4881
|B| = 15.2971
|C| = 17.8326
M := [
    □, □, □, □, □, □, □, □, □, □, □;
    □, □, □, □, □, □, □, □, □, □, □;
    □, □, □, □, □, □, □, □, □, □, □;
    □, □, □, □, □, □, □, □, □, □, □;
    □, □, □, □, □, □, □, □, □, □, □;
    □, □, □, □, □, □, □, □, □, □, □;
    □, □, □, □, □, □, □, □, □, □, □;
    □, □, □, □, □, □, □, □, □, □, □;
    □, □, □, □, □, □, □, □, □, □, □;
    □, □, □, □, □, □, □, □, □, □, □;
    □, □, □, □, □, □, □, □, □, □, 5
]  # error: Missing term or expression.
M :=
    for i ∈ 0, 1 .. 9
        for j ∈ 0, 1 .. 9
            M[i, j] ← round(runif(1, -10, 10))[0]
        M
M = [
    -7, 0, 5, -6, 5, 1, 7, 1, 7, -5;
    -3, -9, -2, -4, -6, -7, 8, -6, 1, -2;
    7, -5, 4, 9, 6, 6, -7, -10, 5, 8;
    5, 3, 4, 0, -5, 3, -5, -1, -3, 0;
    -2, -9, 2, -1, -2, -10, 7, 4, 2, 1;
    -2, 9, 9, 2, -2, 0, 7, 6, 2, -4;
    7, -4, 7, -6, 8, -9, -9, -5, -8, 0;
    -9, -3, 0, -2, 2, 0, 9, 7, 6, 7;
    9, 9, -7, -1, -9, -1, -7, -6, 6, 3;
    6, 7, 0, -8, -3, -2, -4, 5, -9, -3
]
sumEl :=
    for i ∈ 0, 1 .. 9
        for j ∈ 0, 1 .. 9
            sum ← sum + M[i, j]
        sum
sumEl = 4
sumPosEl :=
    for i ∈ 0, 1 .. 9
        for j ∈ 0, 1 .. 9
            if M[i, j] > 0
                sum ← sum + M[i, j]
        sum
sumPosEl = 244
sumNegEl :=
    for i ∈ 0, 1 .. 9
        for j ∈ 0, 1 .. 9
            if M[i, j] < 0
                sum ← sum + M[i, j]
        sum
sumNegEl = -240
X := M[:, 0]
Y := M[9, :]
X*Y = [
    -42, -49, 0, 56, 21, 14, 28, -35, 63, 21;
    -18, -21, 0, 24, 9, 6, 12, -15, 27, 9;
    42, 49, 0, -56, -21, -14, -28, 35, -63, -21;
    30, 35, 0, -40, -15, -10, -20, 25, -45, -15;
    -12, -14, 0, 16, 6, 4, 8, -10, 18, 6;
    -12, -14, 0, 16, 6, 4, 8, -10, 18, 6;
    42, 49, 0, -56, -21, -14, -28, 35, -63, -21;
    -54, -63, 0, 72, 27, 18, 36, -45, 81, 27;
    54, 63, 0, -72, -27, -18, -36, 45, -81, -27;
    36, 42, 0, -48, -18, -12, -24, 30, -54, -18
]
task5
y(r) := e^(-(|r|/3))*cos(r)
# [plot: y(r) vs r]
f(l) :=
    if l < 0
        l ← e^l*l^3
    else
        l ← e^(-l)*l^3
    l
x := -9, -8.75 .. 9
# [plot: f(x) vs x]
g(x) := sqrt(|x|)*sin(x)
x := -2*π, -2*π + π/4 .. 2*π
X := x
g(x)
x := 2*π
X :=
    for i ∈ 0, 1 .. 15
        X[i] ← x
        x ← x + π/4
    X
x := 2*π
Y :=
    for i ∈ 0, 1 .. 15
        Y[i] ← g(x)
        x ← x + π/4
    Y
a := WRITETEXT("X.txt", X)
a := WRITETEXT("Y.txt", Y)
XX := READTEXT("X.txt")
YY := READTEXT("Y.txt")
# [plot: YY vs XX]
task8
q(x) := e^(-x^2)
x := -3, -2 .. 3
# [plot: q(x), d/dx(q(x)) vs x]
task9
f(x, y) := sin(sqrt(x^2 + y^2))/cos(sqrt(x^2 + y^2))
x := -15, -14 .. 15
y := -15, -14 .. 15
f(x, y) = [
    -0.985204; -10.1785; 1.55699; 0.376194; -0.253724; -1.07559; -4.59922; 3.49392; 1.12688; 0.480014
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]
# [3D plot: f(x, y)]
task10
f(x) := x^2 + (x - 2)*sin(x) - 5
x := 3
r := root(f(x), x)  # r1=-1.329  r2=2.2
r = 2.19967
task11
f(x) := x^2*x*sin(2*x) - (x - 5)*cos(x)
f(x) := x^3
x := -4, -3 .. 4
r := root(f(x), x, -4, 4)
r = 0
# [plot: f(x) vs x]
task12
n := round(rnd(10))
n = 2
f(x) := x^3 + (4 - n)*x^2 + (3 - 4*n)*x - 3*n
v := [3; -5; 2; 1]
r := polyroots(v)
r = [-3.61347; 0.806735 - 0.423563i; 0.806735 + 0.423563i]
# Столбец v содержит список коэффициентов в возрастающем порядке x.
task13
n = 2
n*x + (n + 1)*y + (n + 2)*z  # =
6*n + 8 = 20
(n - 3)*x + (n - 2)*y + n*z
# =
6*n - 7 = 5
(n - 1)*x + n*y + (n + 1)*z  # =
6*n + 2 = 14
A := [2, 3, 4; -1, 0, 2; 1, 2, 3]
B := [20; 5; 14]
X := [x; y; z]
X := A^-1*B
X = [1; 2; 3]
X := lsolve(A, B) = [1; 2; 3]
x := 1
y := 2
z := 3
Given
n*x + (n + 1)*y + (n + 2)*z == 6*n + 8
(n - 3)*x + (n - 2)*y + n*z == 6*n - 7
(n - 1)*x + n*y + (n + 1)*z == 6*n + 2
X := Find(x, y, z)  # error: This function is misplaced. Move it to a solve block with one solve block function only.
task14
x1^2/81 + y1^2/16 - 1 == (x1 - 9)^2 + (y1 - 2)^2 - 25 solve, x1, y1 → [(-(4*sqrt(851)*1i) + 32)/15, 0; (4*sqrt(851)*1i + 32)/15, 0]
task15
x := 0, 0.1 .. 10
f(x) := x*sin(x)
# [plot: f(x) vs x]
x := 10
minx := Minimize(f, x) = 11.0855
maxx := Maximize(f, x) = 7.97867
